// COMSOL Multiphysics 6.3.0.290 model "磁定位.mph"
// Outline of the model tree

Parameters
  a = -70
  b = -70
  c = 50
  degX = 10
  degY = 10
  degZ = 10

Probes
  bnd1: Boundary "边界探针 1" (disabled) on no boundaries | expr = mf.normB; unit = T; descr = 磁通密度模; frame = spatial

Coordinate systems
  ie1: InfiniteElement "无限元域 1" on domains 1-4, 7-10 | ScalingType = Spherical

Geometry
  geom1 "几何 1" (3D, length unit mm)
    cyl1: Cylinder "z传感器" | r = 5; h = 10; pos = {a, b, c}
    rot1: Rotate "旋转 1" | input = cyl1; axistype = x; rot = degX; pos = {a, b, c+5}
    rot2: Rotate "旋转 2" | input = rot1; axistype = y; rot = degY; pos = {a, b, c+5}
    rot3: Rotate "旋转 3" | input = rot2; ax2 = {0.0, 0.0}; rot = degZ; pos = {a, b, c+5}
    sph1: Sphere "球体 1" | r = 300; layername = 层 1; layer = 50; layernameold = 层 1
    sel1: ExplicitSelection "显式选择 1" | selection = sph1(1) domains 4, 9
    fin: Finalize "形成联合体"
    sel2: ExplicitSelection "显式选择 2" | selection = fin; selshow = all
    cmd1: CompositeDomains "形成复合域 1" (disabled) | input = fin 6, 7, 8, 9, 10, 16, 17, 18

Materials
  mat3: Common "Air 1" on domains 1-10
    def: def "Basic"
      electricconductivity = 1
      relpermittivity = 1
      relpermeability = 1
  mat7: Common "N52 (Sintered NdFeB)" on domains 6
    def: def "Basic"
      electricconductivity = 1/1.4[uohm*m]
      relpermittivity = 1
    RemanentFluxDensity: RemanentFluxDensity
      murec = 1.05
      normBr = 1.44[T]

Physics
  mf: InductionCurrents "磁场" on all domains
    dependent variable A = {Ax, Ay, Az}
    al1: AmperesLawFluid "安培定律 1" (default)
    mi1: MagneticInsulation "磁绝缘 1" (default)
    init1: init "初始值 1" (default)
    mag1: Magnet "磁体 1" on domains 6
      north1: North "北 1" on boundaries 15
      south1: South "南 1" on boundaries 16

Mesh
  mesh1 "网格 1"
    size: MeshSizeDefault "大小" | hmax = 60; hmin = 10.8
    dis1: Distribution "分布 1" on edges 1, 15, 25, 30, 38, 42 | type = predefined
    ftet1: FreeTet "自由四面体网格 1" on domains 5, 6
    swe1: Sweep "扫掠 1" on domains 1-4, 7-10
      dis1: Distribution "分布 1" on domains 1-4, 7-10

Studies
  std1 "研究 1"
    param: Parametric "参数化扫描"
      sweeptype = filled
      pname = {a, b, c, degX, degY, degZ}
      plistarr = {0, 0, 50, 0, 0, 0}
      punit = {, , , , , }
    stat: Stationary "稳态"

Solver configurations
  sol1 "解 1" (study std1)
    v1: Variables "因变量 1"
    s1: Stationary "稳态求解器 1"
      fc1: FullyCoupled "全耦合 1" | linsolver = i1
      i1: Iterative "迭代 1" | linsolver = fgmres; nlinnormuse = on
        asamg1: AuxiliarySpaceAMG "辅助空间 AMG 1"
  sol2 "参数化解 1" (study std1)
  sol3 "参数化解 2" (study std1)

Datasets
  dset1: Solution | solution = sol1
  cpt1: CutPoint3D "三维截点 1"
    data = dset3
    method = grid
    pointx = range(90,-60,-90)
    pointy = range(90,-60,-90)
    pointz = 0
    gridx = range(90,-60,-90)
    gridy = range(90,-60,-90)
    gridz = 0
  dset2: Solution | solution = sol2
  dset3: Solution | solution = sol3

Plots
  pg1: PlotGroup3D "磁通密度 (mf)" | data = dset1
    strmsl1: StreamlineMultislice "多切面上的流线 1"
      expr = {mf.Bx, mf.By, mf.Bz}
      multiplanexmethod = coord
      xcoord = mf.CPx
      multiplaneymethod = coord
      ycoord = mf.CPy
      multiplanezmethod = coord
      zcoord = mf.CPz
      udist = 0.02
      maxsteps = 5000
      col1: Color "颜色表达式 1" | expr = mf.normB
      filt1: Filter "过滤器 1" | expr = !isScalingSystemDomain
    pt1: Point "点 1" | data = dset1; expr = mf.normB; fixedpointsize = on
  pg2: PlotGroup3D "磁通密度 (mf) 1" | data = dset2
    mslc1: Multislice "多切面 1"
      expr = mf.normB
      multiplanexmethod = coord
      xcoord = mf.CPx
      multiplaneymethod = coord
      ycoord = mf.CPy
      multiplanezmethod = coord
      zcoord = mf.CPz
    strmsl1: StreamlineMultislice "多切面上的流线 1"
      expr = {mf.Bx, mf.By, mf.Bz}
      multiplanexmethod = coord
      xcoord = mf.CPx
      multiplaneymethod = coord
      ycoord = mf.CPy
      multiplanezmethod = coord
      zcoord = mf.CPz
      udist = 0.02
      maxsteps = 5000
      col1: Color "颜色表达式 1" | expr = mf.normB
      filt1: Filter "过滤器 1" | expr = !isScalingSystemDomain
  pg3: PlotGroup3D "磁通密度 (mf) 2" | data = dset3
    mslc1: Multislice "多切面 1"
      expr = mf.normB
      multiplanexmethod = coord
      xcoord = mf.CPx
      multiplaneymethod = coord
      ycoord = mf.CPy
      multiplanezmethod = coord
      zcoord = mf.CPz
    strmsl1: StreamlineMultislice "多切面上的流线 1"
      expr = {mf.Bx, mf.By, mf.Bz}
      multiplanexmethod = coord
      xcoord = mf.CPx
      multiplaneymethod = coord
      ycoord = mf.CPy
      multiplanezmethod = coord
      zcoord = mf.CPz
      udist = 0.02
      maxsteps = 5000
      col1: Color "颜色表达式 1" | expr = mf.normB
      filt1: Filter "过滤器 1" | expr = !isScalingSystemDomain

Exports
  data1: Data "数据 1"
    data = cpt1
    expr = {mf.Bx, mf.By, mf.Bz}
    filename = 111.txt
    parameterlayout = rows
    includenan = off